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A_m := [4.69, 4.7, 5.84; 2.67, 1.75, 6.66; 8.16, 3.39, 9.32]
B_m := [8.25, 3.89, 8.18; 3.57, 6.17, 5.66; 9.73, 8.14, 7.2]
V1 := [6.04; 8.86; 2.78]
V2 := [8.13; 3.14; 2.16]
A_m + B_m = [12.94, 8.59, 14.02; 6.24, 7.92, 12.32; 17.89, 11.53, 16.52]
A_m*B_m = [112.295, 94.7807, 107.014; 93.0768, 75.3962, 79.6976; 170.106, 128.524, 153.04]
A_m*V1 = [86.2048; 50.1466; 105.231]
transpose(V1)*V2 = 82.9304
transpose(V1)*A_m*V2 = 1034.08
V1×V2 = [10.4084; 9.555; -53.0662]
V1*V2 = 82.9304
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|V1| = 11.0774
|V2| = 8.97898
82.93/(11.077*8.979) = 0.833799
sph2xyz(V1) = [-1.80492; 1.14364; -5.64942]
